# Faradays law of induction :
V == N*d/dt(ϕ)
V/N == d/dt(ϕ)
# Integrating Both sides :
ϕ == 1/N*integral(V, t) + ϕ_0
Δϕ == 1/N*integral(V, t)
N*ϕ == integral(V, t)  # eq1
# Key equation :
# Volt-seconds during ON time=Volt-seconds during OFF time
# During on Time : | D: Duty cycle
# Total volt-seconds applied to the primary (ON time) : | T_s: Switching period
# (D*T_s) : On time duration | V_f: Diode forward voltage
V_in*(D*T_s)
# During off Time :
# Voltage across the primary = reflected secondary voltage
V_p_reflected == V_s*N_p/N_s
V_s == V_out + V_f
# (1 - D*T_s) : OFF time duration
# Total volt-seconds applied to the primary (OFF time) :
V_p_reflected*(1 - D*T_s)
# Because of eq1
V_in*(D*T_s) == V_p_reflected*(1 - D*T_s)
V_in*D == V_p_reflected*(1 - D)  # eq2
V_in*D == V_s*N_p/N_s*(1 - D) == (V_out + V_f)*N_p/N_s*(1 - D)
N_p/N_s == V_in*D/((V_out + V_f)*(1 - D))  # eq3
# "Transformer must be designed at the maximum duty cycle (D_max) to ensure proper operation across the full range of input voltages :"
# D_max : maximum Duty cycle
N == N_p/N_s == V_in_min*D_max/((V_out + V_f)*(1 - D_max))
V_in_max := 7.2 V
V_in_min := 5.4 V
V_out := 160 V
I_out := 0.2 A
D_max := 50%
V_f := 0.7 V
n := 85%
N := V_in_min*D_max/((V_out + V_f)*(1 - D_max)) = 0.033603
# Transfromer Turns ratio : | N_s/N_p:
1/N = 29.7593
# Since :
t_ON == D*T_s
# From eq1:
Δϕ == 1/N_P*integral(V_in, t = 0 .. t_ON)
# Since V_in is constant during t_ON
Δϕ == 1/N_P*V_in(D*T_s)
# and
T_s == 1/f_s
Δϕ == 1/N_P*V_in*D/f_s
# Flux Swing :
Δϕ == V_in*D/(N_P*f_s)  # eq4
V == L*d/dt(I)
# L_p: Primary inductance
d/dt(I) == V/L  # ΔI_p: Desired Peak to peak current in the primary winding.
# D: On time duty cycle.
ΔI_p == integral(V_in/L_p, t = 0 .. t_ON)
# Since V_in is constant during t_ON
ΔI_p == V_in/L_p*t_ON == V_in/L_p*D*T_s
# Primary Inductance:
L_p == V_in*D/(ΔI_p*f_sw)  # eq5
Q == C*V
# Capacitor basic equations :
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ΔV == ΔQ/C
# Change in charge related to the ripple current and time :
ΔQ == ΔI_out*t_discharge
t_discharge == T_s/2
ΔQ == 1/2*1/2*T_s*ΔI_out
ΔQ == ΔI_out*1/(4*f_sw)
ΔV_out == ΔQ/C_out
ΔV_out == ΔI_out/(4*f_sw*C_out)
# With smoothing effect (due to capacitor nature ):
ΔV_out == ΔI_out/(8*f_sw*C_out)
V_in_max := 7.2 V
V_in_min := 5.4 V
V_out := 160 V
I_out := 0.2 A
D_max := 50%
V_f := 0.7 V
n := 85%
f_sw := 63 kHz
P_out := V_out*I_out = 32 W
P_in := P_out/n = 37.6471 W
I_in_min := P_in/V_in_min = 6.97168 A
I_in_max := P_in/V_in_max = 5.22876 A
# From eq3
N_min == N_p/N_s == V_in_min*D_max/((V_out + V_f)*(1 - D_max))
N_max == N_p/N_s == V_in_max*D_max/((V_out + V_f)*(1 - D_max))
N_min := V_in_min*D_max/((V_out + V_f)*(1 - D_max)) = 0.033603
N_max := V_in_max*D_max/((V_out + V_f)*(1 - D_max)) = 0.044804
1/N_min = 29.7593
1/N_max = 22.3194
V_p_reflected_min := (V_out + V_f)*N_min = 5.4 V
V_p_reflected_max := (V_out + V_f)*N_max = 7.2 V
# "Designers typically limits ΔI_p to 20% - 40% of the peak primary current "
# From eq5
ΔI_p == 35%*I_p_peak
L_p == V_in*D_max/(ΔI_p*f_sw)
ΔI_p_in_min := 35%*I_in_min = 2.44009 A
ΔI_p_in_max := 35%*I_in_max = 1.83007 A
L_p_in_min := V_in_min*D_max/(ΔI_p_in_min*f_sw) = 17.5638 μH
L_p_in_max := V_in_max*D_max/(ΔI_p_in_max*f_sw) = 31.2245 μH
