# 1dB difference (plus or minus) mathmatical significance :
10*log(ref1/ref2) == 1*dB
ref1/ref2 == 10^(1/10) == 1.259
10^(1/10) = 1.25893
10^(-1/10) = 0.794328
1000*mW == 30*dBm == 10*log(1000*mW/(1*mW))
30*dBm + 1*dBm == 31*dBm == 10*log(1258.925*mW/(1*mW))
10^(31/10) = 1258.93
30*dBm - 1*dBm == 29*dBm == 10*log(794.328*mW/(1*mW))
10^(29/10) = 794.328
10000*mW == 40*dBm == 10*log(10000*mW/(1*mW))
40*dBm + 1*dBm == 41*dBm == 10*log(12589.25*mW/(1*mW))
10^(41/10) = 12589.3
40*dBm - 1*dBm == 39*dBm == 10*log(7943.28*mW/(1*mW))
10^(39/10) = 7943.28
