# Ideal case:
SNR_out == Gain×SignalPower/(Gain×NoisePower) == SNR_in
SNR_out == Gain×SignalPower/(Gain×NoisePower + AmplifierNoise)
# Active components always contributes noise into circuit , thus the goal of LNA is to keep the AmplifierNoise as small as possible.
# Amplitude Modulation (AM)
# Carrier (High Freq)
A_csin(w_ct + ϕ_c)
# Message part :
[1 + a*x_m(t)]
# Message :
x_m(t) == sin(w_mt + ϕ_m)
# Modulated Signal :
[1 + a*x_m(t)]*A_csin(w_ct + ϕ_c)
# 1 Represents DC value of the Mesage:
# Frequency Modulation (FM)
# Carrier (High Freq)
W_c(t) == w_c + k_f*A_msin(w_mt + ϕ_t)
# w_c : default value
# k_f  : coefficient
if (k_f*A_m)/w_m < 1
    NarrowBandFM
# Data(Low Freq) :
A_msin(w_mt + ϕ_t)
# A_m : amplitude of data
# Modulated Signal :
x_fm(t) == A_csin(w_c(t)*t + ϕ_t)  # w_m : frequency of data
# Frequency Modulation (FM)
# Carrier (High Freq)
A_csin(w_c*t + m(t))
# Data(Low Freq) :
m(t) == A_ϕsin(w_mt)
# Modulated Signal :
x_fm(t) == A_csin(w_c*t + m(t))
# Phase Shift Keying Modulation (PSK)
# ϕ = 0°  Data  : 0
cos(2*πf_wt + ϕ)  # ϕ = 180°  Data  : 1
# Frequency Shift Keying Modulation (FSK)
# f_w = f_1  Data  : 0
cos(2*πf_wt + ϕ)  # f_w = f_2  Data  : 1
