# Instantaneous power :
# v : positive to negative , or instantaneous
# V : only positive , or average
p(t) == v(t)*i(t)  # or
v(t)^2/R
# General rules.
# Key equations.
# Average power (Time domain integral )  :
p_ave == 1/T*integral(p(t), t = 0 .. T) == 1/R*1/T*integral(v(t)^2, t = o .. T)  # eq1
# Average voltage squared V(t)^2 over time :
V(t)^2 == 1/T*integral(v(t)^2, t = o .. T)  # eq2
# Root mean square or RMS voltage :
V_rms == sqrt(V(t)^2)  # eq3
# Thus , the average power dissipated in R :
p_ave == V(t)^2/R == V_rms^2/R  # After such operation, negative axies part will become to positive one, thus rms (effective part)  # eq4
# The average power is independent of frequency (sinusoidal function) :
# From eq1 : if
v(t) == A*cos(ωt)
cos(x)^2 == (1 + cos(2*x))/2
# Average votlage / mean value of votlage  :
V(t) == 1/T*integral(A^2*cos(ωt)^2, t = 0 .. T)
V(t) == 1/T*integral(A^2*(1/2 + 1/2*cos(2*ωt)), t = 0 .. T)
# and we know that :
1/T*integral(cos(ωt), t = 0 .. T) == 0
1/T*integral(cos(2*ωt), t = 0 .. T) == 0
# Average Voltage :
V(t) == 1/T*integral(A^2/2, t = 0 .. T) == A^2/2  # eq5
# RMS  Voltage :
V_rms == sqrt(A^2/2) == A/sqrt(2)  # eq6
# root , mean , squared
# This steps taks square root of the average voltage , it is normalizing the squared voltage previous steps has done.
# Exercise : Let's say we have
v(t) == 2*cos(ωt)
R == 50*Ω
# From eq1 and eq5 , average power:
p_ave == 1/R*A^2/2
p_ave == 1/50*4/2 == 2/50 == 0.04*W
# From eq6 , RMS Voltage:
V_rms == 2/sqrt(2)
# From eq4 , average power  :
p_ave == (2/sqrt(2))^2/50 == 2/50 == 0.04*W
# Phasor :
# We have impedance and phasor analysis  :
# Function representaions:
V == |V|*e^jθ_v
v(t) == |V|*cos(ωt + θ_v)
I == |I|*e^jθ_i
i(t) == |I|*cos(ωt + θ_i)
# Imaginary part isn't make any useful here. So we dont write the right part of the Euler's formula.
V == Z*I
# Phase minus , waveform right shift
# Phase plus , waveform left shift
Z == R
I == V/Z == |V|*e^(-j90)/(R*e^j0) == |V|/R*e^(-j90)
Z == jLω
I == V/Z == |V|*e^j0/(R*e^j90) == |V|/Lω*e^(-j90)
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# Power (instantaneous) :
p(t) == v(t)*i(t) == |V|*|I|*cos(ωt + θ_v)*cos(ωt + θ_i)
# from fromula :
cos(a)*cos(b) == (cos(a + b) + cos(a - b))/2
p(t) == v(t)*i(t) == |V|*|I|/2*(cos(2*ωt + θ_v + θ_i) + cos(θ_v - θ_i))
p(t) == v(t)*i(t) == |V|*|I|/2*cos(2*ωt + θ_v + θ_i) + |V|*|I|/2*cos(θ_v - θ_i)
p_ave == 1/T*integral(p(t), t = 0 .. T) == 1/T*integral(|V|*|I|/2*cos(2*ωt + θ_v + θ_i) + |V|*|I|/2*cos(θ_v - θ_i), t = 0 .. T)
# again we know that :
1/T*integral(cos(ωt), t = 0 .. T) == 0
1/T*integral(cos(2*ωt), t = 0 .. T) == 0
p_ave == 1/T*integral(p(t), t = 0 .. T) == 1/T*integral(0 + |V|*|I|/2*cos(θ_v - θ_i), t = 0 .. T)
# Average power (Voltage and Current amplitude form) :
p_ave == 1/2*|V|*|I|*cos(θ_v - θ_i)  # eq7
# and we can define :
ϕ == θ_v - θ_i
# From eq6 we know that :
V_rms == |V|/sqrt(2)
I_rms == |I|/sqrt(2)
# Thus the average power in RMS voltage form  :
p_ave == V_rms*I_rms*cos(θ_v - θ_i)  # eq8
# This is essentally the real part of the Compelx power.
# Example (intuitive analysis) :
# from eq7 :
# Pure Inductor circuit :
p_ave == |V|*|I|/2*cos(θ_v - θ_i) == |V|*|I|/2*cos(90*°) == 0
# Theres is no power dissipation through the inductive element.
# Pure Resistor circuit :
p_ave == |V|*|I|/2*cos(θ_v - θ_i) == |V|*|I|/2*cos(0) == |V|*|I|/2
# Theres is power dissipation through the resistor.
# Example :
# For circuit component complex impedance of 5 + j10 in series with a complex voltage source 2*cos(ωt + 30*°) ,we can have:
v(t) == 2*cos(ωt + 30*°)
Z == 5 + j10
# and we can define :
θ_z == θ_v - θ_i  # θ_z means the phase difference between voltage and current is equal to the phase of impedance.
# Definition of Impedance (Z) in phasor form :
Z == v(t)/i(t)
Z == |V|*e^jθ_v/(|I|*e^jθ_i) == |V|/|I|*e^j(θ_v - θ_i) == |V|/|I|*e^jθ_z == |Z|*e^jθ_z  # eq9
# again from eq7 , p_avecan be also written as  :
p_ave == 1/2*|V|*|I|*cos(θ_z)
# Nothing but alternating form.
# Average Power of the exmaple circuit :
|Z| == |V|/|I|
|I| == |V|/|Z| == 2/sqrt(5^2 + 10^2) == 2*sqrt(5)/25
p_ave == 2*2*sqrt(5)/25/2*cos(arctan(10/5)) == 0.08*W
# Complex Power  :
# Voltage and current phasors : | Voltage and current Time domaine functions :
V == |V|*e^jθ_v
v(t) == |V|*cos(ωt + θ_v) + j*sin(ωt + θ_v)
I == |I|*e^jθ_i
i(t) == |I|*cos(ωt + θ_i) + j*sin(ωt + θ_v)
# From eq7 eq8 , we define Complex Power S as :
S == 1/2*V*conj(I)
# The reason we define complex power as The phasor of voltage times the conjugate of current is :
# We need to express out voltage current phase differencej(θ_v - θ_i) . As in the later proof.
eq10
or
S == V_rms*conj(I_rms)
# Phasor Expansion :
S == 1/2*|V|*e^jθ_v*|I|*e^(-jθ_i) == 1/2*|V|*|I|*e^j(θ_v - θ_i)
S == 1/2*|V|*|I|*e^j(ϕ)  # ϕ: Phase difference between voltage and current
eq11
# Euler's formula Expansion :
S == 1/2*|V|*|I|*cos(ϕ) + j*1/2*|V|*|I|*sin(ϕ)  # eq12
# Average power or active power :
# Power that actually consumed or utilized in an AC circuit.
P_ave == real(S) == 1/2*|V|*|I|*cos(ϕ)
# Average reactive power :
# Power that boucing back and forth between LC components / source and load, measured in volt-amperes reactive (VAR).
Q == imag(S) == j*1/2*|V|*|I|*sin(ϕ)
# Complex Power using Complex Impedance  :
V == Z*I  # P = I^2 * R  = V^2 / R in Ohms law
S == 1/2*Z*I*conj(I) == 1/2*Z*|I|^2  # eq13
S == 1/2*|V|^2/conj(Z)  # Why conjucate of Z here ?, why 1/2 prefix ?
1/2*|V|*|I|*cos(ϕ)
j*1/2*|V|*|I|*sin(ϕ)
# Compoennt | Z | P | Q
R
R
P == |V|^2/R > 0
0
# Absorbs average power
L
jωL
0
Q == j*|V|^2/ωL > 0
# P = V^2/R | Absorbs VARs
C
1/jωC
0
Q == -j*|V|^2*jωC < 0
# Generates VARs
# Complex Power example :
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# Calculate S :
# Time domain voltage wave function.
v(t) == 2*cos(ωt)  # @1MHz
# Impedance in complex form :
Z == 10 + jωL == 10 + j18.85
# Impedance in phasor form :
Z == 21.34*e^j62.05
# From eq13 :
S == 1/2*|V|^2/conj(Z) == 1/2*2^2/(21.34*e^(-j62.05))
S == 2/(21.34*e^(-j62.05)) == 2/21.34*e^j62 == 0.094*e^j62
P_ave == real(S) == 0.094*cos(62*°) == 0.044*W
Q == imag(S) == 0.094*sin(62*°) == 0.083*W
# Maximum Real Power :
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# V and I here are in phasor form.
# from eq10:
p_aveload == p_l == 1/2*real(V_L*conj(I_L))
p_l == 1/2*real(V_s*Z_l/(Z_s + Z_l)*conj*(V_s/(Z_s + Z_l)))
p_l == 1/2*real(V_s*Z_l/(Z_s + Z_l)*conj(V_s)/conj(Z_s + Z_l)) == 1/2*real(V_s*conj(V_s)*Z_l/(Z_s + Z_l)*1/conj(Z_s + Z_l))
conj(A/B) == conj(A)/conj(B)
p_l == 1/2*real(|V_s|^2*Z_l/|Z_s + Z_l|^2) == 1/2*|V_s|^2/|Z_s + Z_l|^2*real(Z_l)
V*conj(V) == |V|*e^jθ_v*|V|*e^(-jθ_v)
V*conj(V) == |V|^2*e^(jθ_v - jθ_v)
p_l == 1/2*|V_s|^2/|Z_s + Z_l|^2*R_l
p_l == 1/2*|V_s|^2/|R_s + jX_s + R_l + jX_l|^2*R_l
V*conj(V) == |V|^2*e^0
V*conj(V) == |V|^2
# The idea of maximum power transfer lies behind this :
# If we want p_l to be maximum , we need the denominatorR_s + jX_s + R_l + jX_l as small as possible. Which means imaginary part shouldn't exists, that means they're complimentary. And when Rs = Rl , we can have the maximum power transferred to the load resistor :
if.
Z_l == conj(Z_s)
Z_s == R_s + jX_s
Z_l == R_s - jX_s
p_l == p_l_max == 1/2*|V_s|^2/|R_s + jX_s + R_s - jX_l|^2*R_s == 1/2*|V_s|^2/|2*R_s|^2*R_s == 1/2*|V_s|^2/(4*|R_s|^2)
# In this case the avilable power of the source at load is only dependent on source capabilites. Otherwise p_l is always less than maximum powerp_l_max at source.
p_l_max == 1/8*|V_s|^2/R_s
# For matched blocks , power gain _(= voltage gain):
# If the input and output impedance of a block is not matched. Pgain != Vgain
P_gain == 10*log(P_out/P_in) == 10*log(V_out^2/R/(V_in^2/R)) == 20*log(V_out/V_in) == V_gain
