V_light := 2.99792458*10^8 m/s
F_mw_freq_lower := 300 MHz
F_mv_freq_upper := 3 GHz
Len_wave_mv_lower := V_light/F_mw_freq_lower = 0.999308 m  # about 1m
Len_wave_mv_upper := V_light/F_mv_freq_upper = 9.99308 cm  # about 10cm
F_rf_freq_lower := 3 kHz
F_rf_freq_upper := 300 MHz
Len_wave_rf_lower := V_light/F_rf_freq_lower = 99.9308 km  # about 100 KM
Len_wave_rf_upper := V_light/F_rf_freq_upper = 99.9308 cm  # about 100cm ( 1m )
# Characteristics comparison :
# RF : Propagates well over long distances and can reflect off the ionosphere , allowing for long-range communication.
# Microwave : More line-of-sight and les likely to reflect off the ionosphere.
# Can be focused into narrow beams for point-to-point communication.
